*HEADING
Four-node FRP-grid interface single-element template
** The U1P element is a placeholder and must be replaced by the preprocessor.
*NODE
1, 0.0, 0.0, 0.0
2, 0.0, 0.0, 0.0
3, 5.0, 0.0, 0.0
4, 5.0, 0.0, 0.0
*ELEMENT, TYPE=U1P, ELSET=INTERFACE_PLACEHOLDER
1, 1, 2, 3, 4
*NSET, NSET=MATRIX
1, 4
*NSET, NSET=FRP
2, 3
*BOUNDARY
MATRIX, 1, 3, 0.0
FRP, 2, 3, 0.0
*STEP, NLGEOM=NO
*STATIC
0.01, 1.0, 1.0E-08, 0.05
*BOUNDARY
FRP, 1, 1, -1.0
*OUTPUT, FIELD
*NODE OUTPUT
U, RF
*END STEP
